"""
Scene: grasp_hold

Standard cube-grasp-and-lift benchmark.
Direct mode: replays a recorded motor trajectory, scores by hold time.

What this file owns:
  - RECORD_FILE path
  - cube_scale ([8, 8, 8] — the standard grasp cube)
  - createScene() wiring

Everything else (env-var config, plugins, controller logic) comes from core.
"""

from __future__ import annotations

import os
import sys
from pathlib import Path

sys.path.insert(
    0, str(next(c for c in Path(__file__).parents if (c / "labtests").is_dir()))
)
from launcher.bootstrap import bootstrap_lab

SCRIPT_DIR, SRC_ROOT, APP_ROOT, LAB_ROOT = bootstrap_lab(__file__)

from geometry.timing_config import DT_DIRECT as DT

# The optimizer records a fresh trajectory per trial (this trial's own
# gripper/leg geometry, via sofaopt_project.py's prepare_trial hook) and
# points OPT_MOTOR_RECORDING at it. Manual/no-trial launches fall back to
# the static reference recording.
RECORD_FILE = os.environ.get("OPT_MOTOR_RECORDING") or str(
    LAB_ROOT / "runtime" / "recordings" / "grasp_hold" / "motor_recording.json"
)


def createScene(rootnode):
    """Build the grasp_hold direct-mode scene with motor playback and scoring."""
    import Sofa.Core  # type: ignore

    from labtests.core.base_scene import build_base_scene
    from labtests.core.modules.collision_stl import setup as setup_collision
    from labtests.core.modules.cube_floor import setup as setup_cube_floor
    from labtests.core.modules.motor_playback import setup as setup_playback
    from labtests.core.playback_controller import make_playback_controller
    from labtests.core.plugins import add_required_plugins
    from labtests.core.scene_config import PlaybackConfig

    cfg = PlaybackConfig.from_env(LAB_ROOT)

    nodes = build_base_scene(rootnode, inverse=False, friction=cfg.friction_coef)
    if nodes is None:
        return
    print(f"[contact] friction configured with mu={cfg.friction_coef:.6f}")
    print(f"[cube] mass_start={cfg.cube_mass_start} kg (default unless CUBE_MASS_START set)")

    add_required_plugins(nodes.simulation)
    rootnode.dt = DT

    gripper_collision = setup_collision(
        nodes.emio, cfg.gripper_finger1_mesh_path, cfg.gripper_finger2_mesh_path
    )

    cube_handles = setup_cube_floor(
        nodes.simulation,
        gripper_collision,
        cube_scale=[8, 8, 8],
        cube_mass=cfg.cube_mass_start,
        floor_center_y=cfg.floor_center_y,
        cube_spawn_clearance=cfg.cube_spawn_clearance,
    )

    playback = setup_playback(nodes.emio, RECORD_FILE)

    writer = cfg.trial.attach(rootnode)

    Base = make_playback_controller(Sofa.Core.Controller)
    nodes.simulation.addObject(
        Base(
            name="PlaybackController",
            rootnode=rootnode,
            playback=playback,
            cube_handles=cube_handles,
            gripper_collision=gripper_collision,
            writer=writer,
            cfg=cfg,
        )
    )
    return rootnode
